# Part A. Butterworth-approach Filter Design
# 16/1/2014
# Lazaridis Nikos
# Α.1 | ButterWorth Analysis
# I select β=β.max και H.o=1
a_max := 1.5
H_o := 1
n := 3
k := 1 .. n
β := sqrt(10^(a_max/10) - 1)
s_k(k) := nthroot(1/β, n)*e^(1i*((2*k + 1)*π/(2*n) + π/2))
s_k(k) = [-1.15902; -0.579508 - 1.00374i; 0.579508 - 1.00374i]
H_BUT(s) := H_o/β/product(s - s_k(k), k = 0 .. n - 1) → 1.55693/((s + 0.57951 - 1.00374i)*(s + 0.57951 + 1.00374i)*(s + 1.15902))
# A.3
# Normalized Transfer function of the Butterworth approach simplifies to:
H_Butterworth(s) := 1.55693/(s^3 + s^2*2.31804 + s*2.68663 + 1.55693)
# The transfer function of the normalized circuit.
# I "break up" the transfer function to two sections:
H_B(s) := A_1/(s + 1.15902)*A_2/(s^2 + s*1.15902 + 1.3433)  # error: This variable is undefined.
# where this must hold:
A_1*A_2 := 1.55693  # error: A name is required here.
# For:
R_o := 1
# I find from the RC circuit of the first section that:
C_o1 := 0.8628
# 1st RC section Transfer function :
H_B1(s) := 1/(R_o*C_o1)/(s + 1/(R_o*C_o1)) → 1.15902/(s + 1.15902)
A_1 := 1.15902
# 2nd section Transfer function, Inverting O.A. of Unit Gain:
H_B2(s) := -R_o/R_o → -1
# 3d section Transfer function, Inverting O.A.:
H_B3(s) := -R_o/(2*R_o) → -1/2
# 4th section Transfer Function Low-Pass Sallen-Key filter according to Design II:
# Given the analysis of Design II and for:
R_o := 1
# &
k_b := 2
# I get:
C_o2 := 0.86281
H_B4(s) := k_b/(R_o^2*C_o2^2)/(s^2 + s*((3 - k)/(R_o*C_o2)) + 1/(R_o^2*C_o2^2)) → 2.68658/(s^2 - s*(1.159*(1 .. 3) - 3.47701) + 1.34329)
A_2 := 2.6866
# Transfer function of the entire Normalized Circuit
H_BUTcircuit(s) := 1/(R_o*C_o1)/(s + 1/(R_o*C_o1))*(-R_o/R_o)*(-R_o/(2*R_o))*k_b/(R_o^2*C_o2^2)/(s^2 + s*((3 - k_b)/(R_o*C_o2)) + 1/(R_o^2*C_o2^2)) → 1.5569/((s + 1.15902)*(1.159*s + s^2 + 1.34329))
# I added the 2nd and 3d sections such that the transfer functions of the analysis and of the circuit have equal numerators.
# Alternatively:
ω_ob1 := 1.15902
ω_ob2 := 1.15901
Q_b := 1
P_ButterworthCircuit(s) := ω_ob1/(s + ω_ob1)*(-R_o/R_o)*(-R_o/(2*R_o))*k_b*ω_ob2^2/(s^2 + s*ω_ob2/Q_b + ω_ob2^2) → 1.55692/((s + 1.15902)*(1.15901*s + s^2 + 1.3433))
Ω := 0, 0.001 .. 5
# Logarithmic gain curve of the normalized Transfer Function and of the Normalized Circuit:
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# A.4 | Denormalizing Butterworth filter
R_n := 10^4
a := 6
f_c := (1 + 0.1*a)*10^3 = 1600
ω_c := 2*π*f_c = 10053.1
R_B := R_o*R_n = 10000
C_B1 := C_o1/(ω_c*R_n) = 8.58243e-9
C_B2 := C_o2/(ω_c*R_n) = 8.58253e-9
# I also select:
R_b := 10^4
# and
R_a := 3*R_b = 30000
# Denormalized Circuit Transfer Function
H_ButterworthFilter(s) := 1/(R_B*C_B1)/(s + 1/(R_B*C_B1))*(-R_B/R_B)*(-R_B/(2*R_B))*k_b/(R_B^2*C_B2^2)/(s^2 + s*((3 - k_b)/(R_B*C_B2)) + 1/(R_B^2*C_B2^2)) → 1.58183*10^12/((s + 1.16517*10^4)*(1.16516*10^4*s + s^2 + 1.35759*10^8))
f := 1, 10 .. 1000000
# Logarithmic gain curve of the Denormalized Circuit
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# Simulation of Butterworth Filter in PsPice
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# Logarithmic gain curve of the Denormalized Butterworth Filter as taken from PsPice:
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# Part B. Chebyshev-approach Filter Design
# B.1 | I choose ε=ε.max and Ho:=1. Also n:=3 and amax:=1.5
C_n := 4
ε := sqrt(10^(a_max/10) - 1) = 0.642291
k := 1 .. n
s_p(k) := sin((2*n + 2*k - 1)*π/(2*n))*sinh(1/n*asinh(1/ε)) + 1i*(cos((2*n + 2*k - 1)*π/(2*n))*cosh(1/n*asinh(1/ε)))
s_p(k) = [-0.210056 - 0.939346i; -0.420112; -0.210056 + 0.939346i]
H_CHEB(s) := H_o/(ε*C_n*product(s - s_p(k), k = 1 .. n)) → 0.38923/((s + 0.21006 - 0.93935i)*(s + 0.21006 + 0.93935i)*(s + 0.42011))
# Normalized Transfer Function of the Chebyshev Approach simplifies to:
H_Chebyshev(s) := 0.38923/(s^3 + s^2*0.84023 + s*1.10299 + 0.38923)
# Transfer function of the normalized Chebyshev filter:
# I "break up" the transfer function of the Chebyshev approach in two sections.
H_C(s) := B_1/(s + 0.42011)*B_2/(s^2 + s*0.42012 + 0.92651)  # error: This variable is undefined.
# Where this must hold:
B_1*B_2 := 0.38923  # error: A name is required here.
# For:
R_c := 1
# I find from the first section RC circuit that:
C_c1 := 2.38033
# 1st RC section Transfer Function:
H_C1(s) := 1/(R_c*C_c1)/(s + 1/(R_c*C_c1)) → 0.42011/(s + 0.42011)
B_1 := 0.42011
# 2nd section Transfer Function, Inverting O.A. of Unit Gain:
H_C2(s) := -R_c/R_c → -1
# 3d section Transfer function of Inverting O.A.:
H_C3(s) := -0.74999*R_c/R_c → -0.74999
# The value of the normalized resistor above was chosen such that, the numerator of the transfer function of the normalized circuit becomes equal to the value of the numerator of the transfer function of the normalized Chebyshev circuit.
# 4th section transfer function of low-pass Sallen-Key filter according to Design III (least sensitivity):
# Given the analysis of Design III of the circuit we deduce:
C_c2 := 0.86281
# &
k_c := 4/3
# I get:
R_c2 := 0.69519
C_c3 := 3.42394
R_c1 := 0.52555
# as well as:
r_b := 3*r_a  # error: This variable is undefined.
H_C4(s) := k_c/(R_c1*R_c2*C_c3*C_c2)/(s^2 + s*(1/(R_c2*C_c3)) + 1/(R_c1*R_c2*C_c3*C_c2)) → 1.23532/(0.42012*s + s^2 + 0.92649)
B_2 := 1.23535
# Transfer Function of the entire Normalized Circuit:
H_CHEBcircuit(s) := 1/(R_c*C_c1)/(s + 1/(R_c*C_c1))*(-R_c/R_c)*(-0.74999*R_c/R_c)*k_c/(R_c1*R_c2*C_c3*C_c2)/(s^2 + s*(1/(R_c2*C_c3)) + 1/(R_c1*R_c2*C_c3*C_c2)) → 0.38922/((s + 0.42011)*(0.42012*s + s^2 + 0.92649))
# I've added the 2nd and 3d sections such that the transfer functions of the Chebyshev approach and of the circuit have equal numerators.
# Alternatively:
ω_oc1 := 1/(R_c*C_c1) → 0.42011
ω_oc2 := 1/(R_c2*C_c2*1.73205) → 0.96254
Q_c := C_c3/(1.73205*C_c2) → 2.29113
# 1.73205=(3)^(1/2)
H_ChebyshevCircuit(s) := ω_oc1/(s + ω_oc1)*(-R_c/R_c)*(-0.74999*R_c/R_c)*k_c*ω_oc2/(s^2 + s*(ω_oc2/Q_c) + ω_oc2) → 0.40437/((s + 0.42011)*(0.42012*s + s^2 + 0.96254))
# Β.2
Ω := 0, 0.001 .. 5
# Logarithmic gain curve of the normalized Chebyshev approach and Chebyshev circuit:
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# Denormalizing Chebyshev Circuit Filter
# It holds that R.n=10^4, as well as f.c=1.6*10^3 Ηz and ω.c=1.00531*10^4 rad/sec
R_C := R_c*R_n = 10000
R_C1 := R_c1*R_n = 5255.5
R_C2 := R_c2*R_n = 6951.9
C_C1 := C_c1/(ω_c*R_n) = 2.36776e-8
C_C2 := C_c2/(ω_c*R_n) = 8.58253e-9
C_C3 := C_c3/(ω_c*R_n) = 3.40586e-8
# I also choose:
R_b := 10^4
# and
R_a := 3*R_b = 30000
# Transfer function of Denormalized circuit.
H_ChebyshevFilter(s) := 1/(R_C*C_C1)/(s + 1/(R_C*C_C1))*(-R_C/R_C)*(-0.74999*R_C/R_C)*k_c/(R_C1*R_C2*C_C3*C_C2)/(s^2 + s*(1/(R_C2*C_C3)) + 1/(R_C1*R_C2*C_C3*C_C2)) → 3.95456*10^11/((s + 4.2234*10^3)*(4.22348*10^3*s + s^2 + 9.36356*10^7))
f := 1, 10 .. 1000000
# Logarithmic gain curve of the Denormalized Circuit.
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# Simulating the Chebyshev Filter in PsPice:
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# Logarithmic gain curve of the denormalized filter in PsPice:
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